# OpenSim document version 40000
XsensDataReaderSettings:
  trial_prefix: MT_01210270_000-000
  ExperimentalSensors:
    ExperimentalSensor _00B4AB26: name_in_model=torso_imu
    ExperimentalSensor _00B4AB22: name_in_model=pelvis_imu
    ExperimentalSensor _00B4AB27: name_in_model=tibia_r_imu
    ExperimentalSensor _00B4AB2B: name_in_model=femur_r_imu
    ExperimentalSensor _00B4AB25: name_in_model=tibia_l_imu
    ExperimentalSensor _00B4AB2d: name_in_model=femur_l_imu
    ExperimentalSensor _00B4AB29: name_in_model=calcn_r_imu
    ExperimentalSensor _00b4AB23: name_in_model=calcn_l_imu
    ExperimentalSensor _00B4AB31: name_in_model=humerus_r_imu
    ExperimentalSensor _00B4AB2E: name_in_model=humerus_l_imu
    ExperimentalSensor _00B4AB2F: name_in_model=ulna_r_imu
    ExperimentalSensor _00B4AB28: name_in_model=ulna_l_imu
